*Heading
** Job name: oring_2d-0508-_0p71_remesh Model name: orint_2d-0505-_0p71_sur2sur-Press_v5
** Generated by: Abaqus/CAE 6.11-1
*Preprint, echo=NO, model=NO, history=NO, contact=NO
**
** PARTS
**
*Part, name=PART-1-1
*Node
  24717,  -2.00027323,   1.78244841
 342711,   -1.7750057,   1.78244817
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*Element, type=CPS3
368867, 370880, 370889, 370881
368966, 370880, 370897, 370969
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*Element, type=CPS4R
368868, 370881, 370889, 370890, 370882
368869, 370882, 370890, 370891, 370883
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*Elset, elset=FAPIAN
 368867, 368868, 368869, 368870, 368871, 368872
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*Elset, elset=ORING_2D, generate
 853405,  871353,       1
*End Part
**
**
** ASSEMBLY
**
*Assembly, name=Assembly
**
*Instance, name=PART-1-1-1, part=PART-1-1
*End Instance
**
*End Assembly
**
** MATERIALS
**
*Material, name=FAPIAN
*Elastic
200000., 0.3
*Material, name=XIANGJIAO
*Hyperelastic, mooney-rivlin
 0.1993, 0.0897,     0.
**
** INTERACTION PROPERTIES
**
*Surface Interaction, name=JIECHU1
1.,
*Friction, slip tolerance=0.005
 0.15,
** ----------------------------------------------------------------
**
** STEP: Step-1
**
*Step, name=Step-1, nlgeom=YES
*Static
0.25, 1., 1e-05, 1.
**
** OUTPUT REQUESTS
**
*Restart, write, frequency=0
**
** FIELD OUTPUT: F-Output-1
**
*Output, field, variable=PRESELECT
**
** HISTORY OUTPUT: H-Output-1
**
*Output, history, variable=PRESELECT
*End Step
** ----------------------------------------------------------------
**
** STEP: Step-2
**
*Step, name=Step-2, nlgeom=YES
*Static
0.05, 1., 1e-05, 0.05
**
** OUTPUT REQUESTS
**
*Restart, write, number interval=1, time marks=NO
**
** FIELD OUTPUT: F-Output-2
**
*Output, field, variable=PRESELECT
**
** HISTORY OUTPUT: H-Output-2
**
*Output, history, variable=PRESELECT
*End Step
** ----------------------------------------------------------------
**
** STEP: Step-3
**
*Step, name=Step-3, nlgeom=YES, inc=1000
*Static
0.02, 1., 1e-08, 0.05
**
** OUTPUT REQUESTS
**
*Restart, write, frequency=5
**
** FIELD OUTPUT: F-Output-2
**
*Output, field, variable=PRESELECT
**
** HISTORY OUTPUT: H-Output-2
**
*Output, history, variable=PRESELECT
*End Step
